# Circuit:
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# 1.) Define lower and upper cut off frequencies:
f_1 := 27.5*10^6
f_2 := 28.5*10^6
B := f_2 - f_1 = 1000000
# 2.) Define inductor core, turns and value (L == L_1 == L_2):
L := 2.12*10^-6  # H = 2.12uH --> 23T @ T50-6 Core --> "toroids.info/T50-6.php"
Q_U := 240  # ... unloaded Q of the resonators
# 3.) Calculate ω_0:
# ω_0... center angular frequency
ω_0 := 2*π*sqrt(f_1*f_2) = 175901136  # rad/sec
# 4.) Calculate C_0:
# C_0... nodal capacitance
C_0 := 1/(ω_0^2*L) = 1.5245e-11
# 5.) Calculate Q_L:
# Q_L... loaded filter Q
Q_L := ω_0/(2*π*(f_2 - f_1)) = 27.9955
# 6.) Calculate C_12:
# C_12... coupling capacitance between resonators
C_12 := C_0/(Q_L*sqrt(2)) = 3.85055e-13
C_12 := 385*10^-15
# 7.) Calculate Q_1 and Q_2:
# Q_1 == Q_2... gives the net Q that each end section must be loaded to
Q_1 := sqrt(2)*Q_L = 39.5917
Q_2 := sqrt(2)*Q_L = 39.5917
# 8.) Calculate the Q_0:
# Q_0... normalized Q
Q_0 := Q_U/Q_L = 8.5728
# 9.) Calculate Q_e1 and Q_e2:
# Q_e1 == Q_e2... external Q
Q_e1 := 1/(1/Q_1 - 1/Q_U) = 47.4132
Q_e2 := 1/(1/Q_1 - 1/Q_U) = 47.4132
# 10.) Calculate R_e1 and R_e2:
# R_e1 and R_e2 ... loading resistance to establish the external Q
R_e1 := Q_e1*ω_0*L = 17680.9  # Ohm
R_e2 := Q_e2*ω_0*L = 17680.9  # Ohm
# 11.) Calculate C_1L and C_2L:
# C_1L and C_2L... couple capacitor --> couple input load to R_e1 and output load toR_e2
R_IN := 1*10^3  # Ohm  # ... input load
R_OUT := 50  # Ohm  # ... output load
C_1L := 1/(ω_0*sqrt(R_e1*R_IN - R_IN^2)) = 1.39194e-12
C_1L := 1.4*10^-12
C_2L := 1/(ω_0*sqrt(R_e2*R_OUT - R_OUT^2)) = 6.05493e-12
C_2L := 6.0*10^-12
# 12.) Calculate C_1 and C_2:
# C_1 and C_2... resonator tune capacitors
C_1 := C_0 - C_1L - C_12 = 1.346e-11
C_2 := C_0 - C_2L - C_12 = 8.85998e-12
# Formulas: https://archive.org/details/SolidStateDesignForTheRadioAmateur1986/page/n239
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