# Transfer Function of 3rd-Order System:
H(s) == H_1(s)*H_2(s)
H_1(s) == 1/(1 + a_1*s)
H_2(s) == b_0/(1 + a_2*s + a_3*s^2)
# --> a1, a2 and a3 are the filter coefficients from the tables in the Tietze-Schenk book.
(1 + a_1*s)*(1 + a_2*s + a_3*s^2) expand → a_1*a_3*s^3 + a_3*s^2 + a_1*a_2*s^2 + a_2*s + a_1*s + 1
α_1 == a_1 + a_2
α_2 == a_1*a_2 + a_3
α_3 == a_1*a_3
β_0 == b_0
H(s) == β_0/(1 + α_1*s + α_2*s^2 + α_3*s^3) == (1 + s/ω_p)*(1 + s/(ω_0*Q) + (s/ω_0)^2)
(1 + s/ω_p)*(1 + s/(ω_0*Q) + (s/ω_0)^2) expand → s^3/(ω_0^2*ω_p) + s^2/ω_0^2 + s^2/(ω_0*ω_p*Q) + s/ω_p + s/(ω_0*Q) + 1
# - Coefficient Comparison:
α_1 == 1/ω_p + 1/(ω_0*Q)
# ~
α_1 == 1/ω_p  # , ω_0*Q > ω_p
α_2 == 1/ω_0^2 + 1/(ω_0*ω_p*Q)
α_3 == 1/(ω_0^2*ω_p)
# - Rearranging:
ω_p == 1/α_1*ω_c == 1/(a_1 + a_2)*ω_c
ω_0 == sqrt(α_1/α_3)*ω_c == sqrt((a_1 + a_2)/(a_1*a_3))*ω_c
Q == α_1*α_3*sqrt(α_1/α_3)/(α_1*α_2 - α_3) == (a_1 + a_2)*a_1*a_3*sqrt((a_1 + a_2)/(a_1*a_3))/((a_1 + a_2)*(a_1*a_2 + a_3) - a_1*a_3) == (a_1 + a_2)*a_1*a_3*sqrt((a_1 + a_2)/(a_1*a_3))/(a_1^2*a_2 + a_2*a_3 + a_1*a_2^2)
# 3rd-Order Filter Coefficients (Tietze Schenk Table):
a_1 := 1.0000
a_2 := 1.0000
a_3 := 1.0000
ω_p := 1/(a_1 + a_2)*ω_c → 0.5*ω_c
ω_0 := sqrt((a_1 + a_2)/(a_1*a_3))*ω_c → 1.41421356237*ω_c
Q := (a_1 + a_2)*a_1*a_3*sqrt((a_1 + a_2)/(a_1*a_3))/(a_1^2*a_2 + a_2*a_3 + a_1*a_2^2) = 0.942809
# Design Equations: | ... derivation see white paper
β_0 == b_0 == -R_4/(R_1 + R_2)
α_1 == a_1 + a_2 == ((R_1*(R_3 + R_4) + R_2*(R_3 + R_4) + R_3*R_4)*C_3 + R_1*R_2*C_1)/(R_1 + R_2)*ω_c
α_2 == a_1*a_2 + a_3 == (R_3*R_4*(R_1 + R_2)*C_2*C_3 + R_1*(R_2*R_3 + R_2*R_4 + R_3*R_4)*C_1*C_3)/(R_1 + R_2)*ω_c^2
α_3 == a_1*a_3 == R_1*R_2*R_3*R_4*C_1*C_2*C_3/(R_1 + R_2)*ω_c^3
clear(β_0, α_1, α_2, α_3, b_0, a_1, a_2, a_3, f_c, ω_c, ω_p, ω_0, Q, R_1, R_2, R_3, R_4, C_1, C_2, C_3)
# Design Strategy:
# - Given Values:
A_cl := -1
# -->
b_0 := A_cl
f_c := 400000  # -->
ω_c := 2*π*f_c = 2513274
R_1 + R_2 - ω_p*(C_3*(R_1 + R_2)*R_4 + C_1*R_1*R_2) solve, C_1 → ((-(C_3*R_2) - C_3*R_1)*R_4*ω_p + R_2 + R_1)/(R_1*R_2*ω_p)
a_1 := 1.0000
a_2 := 1.0000
a_3 := 1.0000  # (Butterworth)
R_1 := 267*10^3
k := 1.56
C_1 := 3*10^-12
C_3 := 100*10^-15
# 1. Calculate R_2:
R_2 := k*R_1 = 416520
# 2. Calculate R_4:
b_0 == -R_4/(R_1 + R_2)
# -->
R_4 == -b_0*(R_1 + R_2) == -b_0*(1 + k)*R_1
R_4 := -b_0*(R_1 + R_2) = 683520
# 3. Calculate R_3:
ω_p := 1/(a_1 + a_2)*ω_c = 1256637
ω_p == (R_1 + R_2)/((R_1*(R_3 + R_4) + R_2*(R_3 + R_4) + R_3*R_4)*C_3 + R_1*R_2*C_1)
R_3 := (R_1 + R_2 - ω_p*(C_3*(R_1 + R_2)*R_4 + C_1*R_1*R_2))/((R_1 + R_2 + R_4)*C_3*ω_p) = 1196567
R_3 == ((1 + k)*R_1 - ω_p*(C_3*((1 + k)*R_1)*R_4 + k*R_1^2*C_1))/(((1 + k)*R_1 + R_4)*C_3*ω_p)  # (with k-Factor)
# 4. Conditions for C_1 and C_3:
# Derived from R_3= ...
R_1 + R_2 - ω_p*(C_3*(R_1 + R_2)*R_4 + C_1*R_1*R_2) > 0
C_1 < (R_1 + R_2 - ω_p*(R_1 + R_2)*R_4*C_3)/(ω_p*R_1*R_2)
# =
((1 + k) + ω_p*b_0*R_1*(1 + k)^2*C_3)/(ω_p*k*R_1) = 4.47086e-12
C_3 < (R_1 + R_2 - ω_p*R_1*R_2*C_1)/(ω_p*(R_1 + R_2)*R_4)
# =
(ω_p*k/(1 + k)*R_1*C_1 - 1)/(ω_p*b_0*(1 + k)*R_1) = 4.50119e-13
# 5. Calculate C_2:
ω_0 := sqrt((a_1 + a_2)/(a_1*a_3))*ω_c = 3554306
ω_0 == sqrt(((R_1*(R_3 + R_4) + R_2*(R_3 + R_4) + R_3*R_4)*C_3 + R_1*R_2*C_1)/(R_1*R_2*R_3*R_4*C_1*C_2*C_3))
C_2 := ((R_1*(R_3 + R_4) + R_2*(R_3 + R_4) + R_3*R_4)*C_3 + R_1*R_2*C_1)/(ω_0^2*R_1*R_2*R_3*R_4*C_1*C_3) = 1.57788e-12
# 6. Check b_0, ω_p, ω_0 and Q:
R_1 = 267000
C_1 = 3e-12
R_2 = 416520
C_2 = 1.57788e-12
R_3 = 1196567
C_3 = 1e-13
R_4 = 683520
b_0 := -R_4/(R_1 + R_2) = -1
ω_p := (R_1 + R_2)/((R_1*(R_3 + R_4) + R_2*(R_3 + R_4) + R_3*R_4)*C_3 + R_1*R_2*C_1) = 1256637
# -->
# ~
1/(a_1 + a_2)*ω_c = 1256637  # check!
ω_0 := sqrt(((R_1*(R_3 + R_4) + R_2*(R_3 + R_4) + R_3*R_4)*C_3 + R_1*R_2*C_1)/(R_1*R_2*R_3*R_4*C_1*C_2*C_3)) = 3554306
# -->
# ~
sqrt((a_1 + a_2)/(a_1*a_3))*ω_c = 3554306  # check!
Q := ((R_1*(R_3 + R_4) + R_2*(R_3 + R_4) + R_3*R_4)*C_3 + R_1*R_2*C_1)*(R_1*R_2*R_3*R_4*C_1*C_2*C_3)*sqrt(((R_1*(R_3 + R_4) + R_2*(R_3 + R_4) + R_3*R_4)*C_3 + R_1*R_2*C_1)/(R_1*R_2*R_3*R_4*C_1*C_2*C_3))/(((R_1*(R_3 + R_4) + R_2*(R_3 + R_4) + R_3*R_4)*C_3 + R_1*R_2*C_1)*(R_3*R_4*(R_1 + R_2)*C_2*C_3 + R_1*(R_2*R_3 + R_2*R_4 + R_3*R_4)*C_1*C_3) - R_1*R_2*R_3*R_4*(R_1 + R_2)*C_1*C_2*C_3) = 0.942664
# Q must equal the Q from Tietze Schenk table. If not, adjust k below. Since these design steps are based on an approximation, we need this design knob k anyway.
# -->
# ~
(a_1 + a_2)*a_1*a_3*sqrt((a_1 + a_2)/(a_1*a_3))/(a_1^2*a_2 + a_2*a_3 + a_1*a_2^2) = 0.942809  # check!
# 7. Check α_1, α_2 and α_3:
α_1 := ((R_1*(R_3 + R_4) + R_2*(R_3 + R_4) + R_3*R_4)*C_3 + R_1*R_2*C_1)/(R_1 + R_2)*ω_c = 2
# =
a_1 + a_2 = 2
α_2 := (R_3*R_4*(R_1 + R_2)*C_2*C_3 + R_1*(R_2*R_3 + R_2*R_4 + R_3*R_4)*C_1*C_3)/(R_1 + R_2)*ω_c^2 = 2.00023
# =
a_1*a_2 + a_3 = 2
α_3 := R_1*R_2*R_3*R_4*C_1*C_2*C_3/(R_1 + R_2)*ω_c^3 = 1
Q := α_1*α_3*sqrt(α_1/α_3)/(α_1*α_2 - α_3) = 0.942664
# =
a_1*a_3 = 1
# 8.) Fine-Tuning:
# Instead of a single massive equation Q(k), use this recommended iterative design:
# - Input R_1, C_1, C_3, k and the desired filter coefficients a_1, a_2, a_3
# - Go through steps 1 to 6.
# - Adjust k:
# - If calculated Q is too high, decrease k.
# - If calculated Q is too low, increase k.
# In the end, the Q in 6.) has to equal the Q from the coefficient formula in 7.). In this case, Q == 0.943. The calculated value of Q deviates a little from the theoretical value, since it has been approximated, as shown above. However, with the k-factor, the correct filter approximation can still be achieved. When this is the case, all the coefficients in 7.) also equal the theoretical value, coming from Tietze Schenk tables.
# 9.) Input Impedance:
# The input impedance at dc can be approximated with
Z_in0 := R_1 + R_2 + R_3 = 1880087
# The input impedance transfer function will be derived soon...
